// COMSOL Multiphysics 5.6.0.401 model "cell growth_volume expansion only.mph"
// Outline of the model tree

Parameters
  rc = 50 [um]  // cell radius
  r_mat = 250 [um]  // matrix size
  G_cell = 8 [kPa]  // shear modulus of cell
  k_cell = 800 [Pa]  // bulk modulus of cell
  G_h = 3000 [Pa]  // shear modulus of gel
  k_h = G_h/3*5 [Pa]  // bulk modulus of gel
  rho = 1e3  // density
  tBM = 1 [um]  // thickness of BM
  G_BM = 8.2 [kPa]  // shear modulus of BM
  K_BM = 350 [kPa]  // bulk modulus of BM
  l_g = 2.5  // growth factor
  rho0_bar = 700 [Pa]  // contractility
  t_loss = tBM*3  // thickness of loss of tangential force
  l_g0 = l_g  // growth factor
  V_BM = 4/3*pi*((rc+tBM)^3-rc^3)  // volume of BM

Coordinate systems
  sys2: Mapping "Mapped System 2"

Geometry
  geom1 "Geometry 1" (2D axisymmetric, length unit µm)
    c1: Circle | rot = -90; r = r_mat; angle = 180
    c2: Circle | rot = -90; r = rc; angle = 180
    c3: Circle | rot = -90; r = rc+tBM; angle = 180
    c4: Circle | rot = 85; r = rc-t_loss; angle = 5
    c5: Circle | rot = 85; r = rc; angle = 5
    fin: Finalize "Form Union"

Physics
  solid: SolidMechanics on all domains
    dependent variable u = {u, v, w}
    lemm1: LinearElasticModel "Linear Elastic Material 1" (default)
    axi1: AxialSymmetrySolid "Axial Symmetry 1" (default)
    free1: Free (default)
    init1: init "Initial Values 1" (default)
    hmm1: HyperelasticModel "cell" on domains 3, 4
      kappa = k_cell
      Compressibility_NeoHookean = NearlyIncompressibleQuadratic
      muLame_mat = userdef
      muLame = G_cell
      rho_mat = userdef
      rho = rho
      eiel1: ExternalStrain on all domains | StrainInput = DeformationGradient; Fext = l_g
      exs1: ExternalStress on all domains | sext = rho0_bar; StressInputType = StressTensorSpatial
    hmm2: HyperelasticModel "matrix" on domains 1
      kappa = k_h
      Compressibility_NeoHookean = NearlyIncompressibleQuadratic
      muLame_mat = userdef
      muLame = G_h
      rho_mat = userdef
      rho = rho
    hmm3: HyperelasticModel "BM" on domains 2
      MaterialModel = Delfino
      kappa = K_BM
      Compressibility_NeoHookean = NearlyIncompressibleQuadratic
      muLame_mat = userdef
      muLame = G_BM
      rho_mat = userdef
      rho = rho
      Compressibility_Fung = NearlyIncompressibleQuadratic
      aDelf_mat = userdef
      aDelf = G_BM
      bDelf_mat = userdef
      bDelf = 4.2
      AFung_mat = userdef
      AFung = {0, 0, 0, 0, 0, 0, 0, 0, 0, 0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}
      cFung_mat = userdef
      cFung = 0
      eiel1: ExternalStrain (disabled) on all domains | StrainInput = DeformationGradient; Fext = l_g
    roll1: Roller on boundaries 10, 16
    hmm4: HyperelasticModel "enhanced" on domains 5
      kappa = k_cell
      Compressibility_NeoHookean = NearlyIncompressibleQuadratic
      muLame_mat = userdef
      muLame = G_cell
      rho_mat = userdef
      rho = rho
      eiel1: ExternalStrain on all domains | StrainInput = DeformationGradient; Fext = l_g
      exs1: ExternalStress on all domains | sext = rho0_bar; StressInputType = StressTensorSpatial
    bndl1: BoundaryLoad (disabled) on boundaries 14 | FperArea = {-700, 0, 0}

Mesh
  mesh1 "Mesh 1" (physics-controlled)
    size: MeshSizeDefault | hauto = 2

Studies
  std1 "Study 1"
    stat: Stationary

Solver configurations
  sol1 "Solution 1" (study std1)
    v1: Variables "Dependent Variables 1"
    s1: Stationary "Stationary Solver 1"
      dDef: Direct
      fc1: FullyCoupled | linsolver = dDef

Datasets
  dset1: Solution on domains 2 | solution = sol1
  rev1: Revolve2D "Revolution 2D 1" | data = dset1; revangle = 225

Derived values
  int1: IntVolume "Volume Integration 1"
    data = rev1
    table = tbl1
    expr = {(solid.sr*Z^2/(R^2+Z^2)+solid.sz*R^2/(R^2+Z^2)-solid.srz*R*Z/(R^2+Z^2)*2)/V_BM, -(solid.sr*R^2/(R^2+Z^2)+solid.sz*Z^2/(R^2+Z^2)+solid.srz*R*Z/(R^2+Z^2)*2)/V_BM}
    unit = {Pa, Pa}
    descr = {Average hoop stress, Average radial stress (inward)}
  av1: AvVolume "Volume Average 1"
    data = rev1
    table = tbl2
    expr = {solid.sr*Z^2/(R^2+Z^2)+solid.sz*R^2/(R^2+Z^2)-solid.srz*R*Z/(R^2+Z^2)*2, -(solid.sr*R^2/(R^2+Z^2)+solid.sz*Z^2/(R^2+Z^2)+solid.srz*R*Z/(R^2+Z^2)*2)}
    descr = {Average hoop stress, Average radial stress}

Tables
  mm1: Table "Maximum and minimum values"
    // Max/min surface
    R | Z | von Mises stress (N/m^2)
    49.9806 | 1.39135 | 174.39
  mm2: Table "Maximum and minimum values 1"
    // Max/min line
    rev1x | rev1y | rev1z | solid.sr*Z^2/(R^2+Z^2)+solid.sz*R^2/(R^2+Z^2)-solid.srz*R*Z/(R^2+Z^2)*2 (N/m^2)
    4.35779 | 0 | 49.8097 | 9.8578
    3.06162e-15 | 0 | -50 | 126.056
  tbl1: Table
    // Volume Integration 1
    Hoop stress (N*m) | radial stress (inward) (N*m) | Average hoop stress (N/m^2) | Average radial stress (inward) (N/m^2) | Average hoop stress (N/m^2) | Average radial stress (inward) (N/m^2)
    2.48424e-12 | 8.96174e-13 | 77.5151 | 27.9631 | 77.5151 | 27.9631
  tbl2: Table
    // Volume Average 1
    Average hoop stress (N/m^2) | Average radial stress (N/m^2) | Average hoop stress (N/m^2) | Average radial stress (N/m^2)
    124.356 | 44.8608 | 124.356 | 44.8608

Plots
  pg1: PlotGroup2D "Stress (solid)" | data = dset1
    surf1: Surface | expr = solid.sr*Z/sqrt(R^2+Z^2)+abs(solid.sz)*R/sqrt(R^2+Z^2)
      def: Deform "Deformation" (disabled) | expr = {u, w}; descr = Displacement field
    mms1: MaxMinSurface "Max stress" | expr = solid.mises; display = max; table = mm1
  pg2: PlotGroup3D "Stress, 3D (solid)" | data = rev1
    surf1: Surface
      expr = solid.sr*Z^2/(R^2+Z^2)+solid.sz*R^2/(R^2+Z^2)-solid.srz*R*Z/(R^2+Z^2)*2
      typeintitle = off
      descriptionintitle = off
      prefixintitle = Surface: Stress tensor, r component
      def: Deform "Deformation" (disabled) | revcoordsys = cylindrical; expr = {u, 0, w}; descr = Displacement field
    mml1: MaxMinLine | expr = solid.sr*Z^2/(R^2+Z^2)+solid.sz*R^2/(R^2+Z^2)-solid.srz*R*Z/(R^2+Z^2)*2; table = mm2
    arwl1: ArrowLine (disabled)
      revcoordsys = cylindrical
      expr = {solid.Tar, solid.Taphi, solid.Taz}
      descr = Traction (force/area) (spatial frame)